// SBML level 3 version 2

model indra_model()

  // Compartments:
  compartment default = 1;

  // Species:
  substanceOnly species __s0 in default = SOS1_0; __s0 is "SOS1(grb2=None)";
  substanceOnly species __s1 in default = GRB2_0; __s1 is "GRB2(sos=None, erbb=None)";
  substanceOnly species __s2 in default = KRAS_0; __s2 is "KRAS(activity='inactive', map3k=None)";
  substanceOnly species __s3 in default = BRAF_0; __s3 is "BRAF(vemurafenib=None, V600='WT', map3k=None, ras=None)";
  substanceOnly species __s4 in default = vemurafenib_0; __s4 is "vemurafenib(map3k=None)";
  substanceOnly species __s5 in default = RAF1_0; __s5 is "RAF1(map3k=None, vemurafenib=None, ras=None)";
  substanceOnly species __s6 in default = EGFR_0; __s6 is "EGFR(grb2=None, egfr_ligand=None, erbb=None)";
  substanceOnly species __s7 in default = EGF_0; __s7 is "EGF(erbb=None)";
  substanceOnly species __s8 in default = DUSP6_0; __s8 is "DUSP6()";
  substanceOnly species __s9 in default = MAPK1_0; __s9 is "MAPK1(phospho='u')";
  substanceOnly species __s10 in default = SPRY4_0; __s10 is "SPRY4()";
  substanceOnly species __s11 in default = MAP2K1_0; __s11 is "MAP2K1(phospho='u')";
  substanceOnly species __s12 in default = 0; __s12 is "BRAF(vemurafenib=1, V600='WT', map3k=None, ras=None) ._br_vemurafenib(map3k=1)";
  substanceOnly species __s13 in default = 0; __s13 is "RAF1(map3k=None, vemurafenib=1, ras=None) ._br_vemurafenib(map3k=1)";
  substanceOnly species __s14 in default = 0; __s14 is "EGF(erbb=1) ._br_EGFR(grb2=None, egfr_ligand=1, erbb=None)";
  substanceOnly species __s15 in default = 0; __s15 is "EGF(erbb=1) ._br_EGFR(grb2=None, egfr_ligand=1, erbb=2) ._br_EGFR(grb2=None, egfr_ligand=None, erbb=2)";
  substanceOnly species __s16 in default = 0; __s16 is "EGF(erbb=1) ._br_EGF(erbb=2) ._br_EGFR(grb2=None, egfr_ligand=1, erbb=3) ._br_EGFR(grb2=None, egfr_ligand=2, erbb=3)";
  substanceOnly species __s17 in default = 0; __s17 is "EGFR(grb2=None, egfr_ligand=None, erbb=1) ._br_EGFR(grb2=None, egfr_ligand=None, erbb=1)";
  substanceOnly species __s18 in default = 0; __s18 is "EGF(erbb=1) ._br_EGFR(grb2=3, egfr_ligand=1, erbb=2) ._br_EGFR(grb2=None, egfr_ligand=None, erbb=2) ._br_GRB2(sos=None, erbb=3)";
  substanceOnly species __s19 in default = 0; __s19 is "EGF(erbb=1) ._br_EGFR(grb2=None, egfr_ligand=1, erbb=2) ._br_EGFR(grb2=3, egfr_ligand=None, erbb=2) ._br_GRB2(sos=None, erbb=3)";
  substanceOnly species __s20 in default = 0; __s20 is "EGF(erbb=1) ._br_EGF(erbb=2) ._br_EGFR(grb2=4, egfr_ligand=1, erbb=3) ._br_EGFR(grb2=None, egfr_ligand=2, erbb=3) ._br_GRB2(sos=None, erbb=4)";
  substanceOnly species __s21 in default = 0; __s21 is "EGF(erbb=1) ._br_EGFR(grb2=3, egfr_ligand=1, erbb=2) ._br_EGFR(grb2=None, egfr_ligand=None, erbb=2) ._br_GRB2(sos=4, erbb=3) ._br_SOS1(grb2=4)";
  substanceOnly species __s22 in default = 0; __s22 is "EGF(erbb=1) ._br_EGFR(grb2=None, egfr_ligand=1, erbb=2) ._br_EGFR(grb2=3, egfr_ligand=None, erbb=2) ._br_GRB2(sos=4, erbb=3) ._br_SOS1(grb2=4)";
  substanceOnly species __s23 in default = 0; __s23 is "EGF(erbb=1) ._br_EGF(erbb=2) ._br_EGFR(grb2=4, egfr_ligand=1, erbb=3) ._br_EGFR(grb2=None, egfr_ligand=2, erbb=3) ._br_GRB2(sos=5, erbb=4) ._br_SOS1(grb2=5)";
  substanceOnly species __s24 in default = 0; __s24 is "EGFR(grb2=2, egfr_ligand=None, erbb=1) ._br_EGFR(grb2=None, egfr_ligand=None, erbb=1) ._br_GRB2(sos=None, erbb=2)";
  substanceOnly species __s25 in default = 0; __s25 is "EGF(erbb=1) ._br_EGFR(grb2=2, egfr_ligand=1, erbb=None) ._br_GRB2(sos=None, erbb=2)";
  substanceOnly species __s26 in default = 0; __s26 is "EGFR(grb2=1, egfr_ligand=None, erbb=None) ._br_GRB2(sos=None, erbb=1)";
  substanceOnly species __s27 in default = 0; __s27 is "EGF(erbb=1) ._br_EGFR(grb2=3, egfr_ligand=1, erbb=2) ._br_EGFR(grb2=4, egfr_ligand=None, erbb=2) ._br_GRB2(sos=None, erbb=3) ._br_GRB2(sos=None, erbb=4)";
  substanceOnly species __s28 in default = 0; __s28 is "EGF(erbb=1) ._br_EGF(erbb=2) ._br_EGFR(grb2=4, egfr_ligand=1, erbb=3) ._br_EGFR(grb2=5, egfr_ligand=2, erbb=3) ._br_GRB2(sos=None, erbb=4) ._br_GRB2(sos=None, erbb=5)";
  substanceOnly species __s29 in default = 0; __s29 is "KRAS(activity='active', map3k=None)";
  substanceOnly species __s30 in default = 0; __s30 is "EGFR(grb2=2, egfr_ligand=None, erbb=1) ._br_EGFR(grb2=None, egfr_ligand=None, erbb=1) ._br_GRB2(sos=3, erbb=2) ._br_SOS1(grb2=3)";
  substanceOnly species __s31 in default = 0; __s31 is "EGF(erbb=1) ._br_EGFR(grb2=2, egfr_ligand=1, erbb=None) ._br_GRB2(sos=3, erbb=2) ._br_SOS1(grb2=3)";
  substanceOnly species __s32 in default = 0; __s32 is "EGFR(grb2=1, egfr_ligand=None, erbb=None) ._br_GRB2(sos=2, erbb=1) ._br_SOS1(grb2=2)";
  substanceOnly species __s33 in default = 0; __s33 is "EGF(erbb=1) ._br_EGFR(grb2=3, egfr_ligand=1, erbb=2) ._br_EGFR(grb2=4, egfr_ligand=None, erbb=2) ._br_GRB2(sos=5, erbb=3) ._br_GRB2(sos=None, erbb=4) ._br_SOS1(grb2=5)";
  substanceOnly species __s34 in default = 0; __s34 is "EGF(erbb=1) ._br_EGFR(grb2=3, egfr_ligand=1, erbb=2) ._br_EGFR(grb2=4, egfr_ligand=None, erbb=2) ._br_GRB2(sos=5, erbb=4) ._br_GRB2(sos=None, erbb=3) ._br_SOS1(grb2=5)";
  substanceOnly species __s35 in default = 0; __s35 is "EGF(erbb=1) ._br_EGF(erbb=2) ._br_EGFR(grb2=4, egfr_ligand=1, erbb=3) ._br_EGFR(grb2=5, egfr_ligand=2, erbb=3) ._br_GRB2(sos=6, erbb=4) ._br_GRB2(sos=None, erbb=5) ._br_SOS1(grb2=6)";
  substanceOnly species __s36 in default = 0; __s36 is "EGFR(grb2=2, egfr_ligand=None, erbb=1) ._br_EGFR(grb2=3, egfr_ligand=None, erbb=1) ._br_GRB2(sos=None, erbb=2) ._br_GRB2(sos=None, erbb=3)";
  substanceOnly species __s37 in default = 0; __s37 is "GRB2(sos=1, erbb=None) ._br_SOS1(grb2=1)";
  substanceOnly species __s38 in default = 0; __s38 is "BRAF(vemurafenib=None, V600='WT', map3k=None, ras=1) ._br_KRAS(activity='active', map3k=1)";
  substanceOnly species __s39 in default = 0; __s39 is "BRAF(vemurafenib=2, V600='WT', map3k=None, ras=1) ._br_KRAS(activity='active', map3k=1) ._br_vemurafenib(map3k=2)";
  substanceOnly species __s40 in default = 0; __s40 is "EGF(erbb=1) ._br_EGFR(grb2=3, egfr_ligand=1, erbb=2) ._br_EGFR(grb2=4, egfr_ligand=None, erbb=2) ._br_GRB2(sos=5, erbb=3) ._br_GRB2(sos=6, erbb=4) ._br_SOS1(grb2=6) ._br_SOS1(grb2=5)";
  substanceOnly species __s41 in default = 0; __s41 is "EGF(erbb=1) ._br_EGF(erbb=2) ._br_EGFR(grb2=4, egfr_ligand=1, erbb=3) ._br_EGFR(grb2=5, egfr_ligand=2, erbb=3) ._br_GRB2(sos=6, erbb=4) ._br_GRB2(sos=7, erbb=5) ._br_SOS1(grb2=7) ._br_SOS1(grb2=6)";
  substanceOnly species __s42 in default = 0; __s42 is "EGFR(grb2=2, egfr_ligand=None, erbb=1) ._br_EGFR(grb2=3, egfr_ligand=None, erbb=1) ._br_GRB2(sos=4, erbb=2) ._br_GRB2(sos=None, erbb=3) ._br_SOS1(grb2=4)";
  substanceOnly species __s43 in default = 0; __s43 is "EGFR(grb2=2, egfr_ligand=None, erbb=1) ._br_EGFR(grb2=3, egfr_ligand=None, erbb=1) ._br_GRB2(sos=4, erbb=2) ._br_GRB2(sos=5, erbb=3) ._br_SOS1(grb2=4) ._br_SOS1(grb2=5)";
  substanceOnly species __s44 in default = 0; __s44 is "KRAS(activity='active', map3k=1) ._br_RAF1(map3k=None, vemurafenib=None, ras=1)";
  substanceOnly species __s45 in default = 0; __s45 is "KRAS(activity='active', map3k=1) ._br_RAF1(map3k=None, vemurafenib=2, ras=1) ._br_vemurafenib(map3k=2)";
  substanceOnly species __s46 in default = 0; __s46 is "BRAF(vemurafenib=None, V600='WT', map3k=1, ras=2) ._br_BRAF(vemurafenib=None, V600='WT', map3k=1, ras=None) ._br_KRAS(activity='active', map3k=2)";
  substanceOnly species __s47 in default = 0; __s47 is "BRAF(vemurafenib=3, V600='WT', map3k=1, ras=2) ._br_BRAF(vemurafenib=None, V600='WT', map3k=1, ras=None) ._br_KRAS(activity='active', map3k=2) ._br_vemurafenib(map3k=3)";
  substanceOnly species __s48 in default = 0; __s48 is "BRAF(vemurafenib=None, V600='WT', map3k=1, ras=2) ._br_BRAF(vemurafenib=3, V600='WT', map3k=1, ras=None) ._br_KRAS(activity='active', map3k=2) ._br_vemurafenib(map3k=3)";
  substanceOnly species __s49 in default = 0; __s49 is "BRAF(vemurafenib=3, V600='WT', map3k=1, ras=2) ._br_BRAF(vemurafenib=4, V600='WT', map3k=1, ras=None) ._br_KRAS(activity='active', map3k=2) ._br_vemurafenib(map3k=4) ._br_vemurafenib(map3k=3)";
  substanceOnly species __s50 in default = 0; __s50 is "BRAF(vemurafenib=None, V600='WT', map3k=1, ras=2) ._br_BRAF(vemurafenib=None, V600='WT', map3k=1, ras=3) ._br_KRAS(activity='active', map3k=2) ._br_KRAS(activity='active', map3k=3)";
  substanceOnly species __s51 in default = 0; __s51 is "BRAF(vemurafenib=3, V600='WT', map3k=1, ras=2) ._br_BRAF(vemurafenib=None, V600='WT', map3k=1, ras=4) ._br_KRAS(activity='active', map3k=4) ._br_KRAS(activity='active', map3k=2) ._br_vemurafenib(map3k=3)";
  substanceOnly species __s52 in default = 0; __s52 is "BRAF(vemurafenib=3, V600='WT', map3k=1, ras=2) ._br_BRAF(vemurafenib=5, V600='WT', map3k=1, ras=4) ._br_KRAS(activity='active', map3k=2) ._br_KRAS(activity='active', map3k=4) ._br_vemurafenib(map3k=3) ._br_vemurafenib(map3k=5)";
  substanceOnly species __s53 in default = 0; __s53 is "BRAF(vemurafenib=None, V600='WT', map3k=1, ras=None) ._br_KRAS(activity='active', map3k=2) ._br_RAF1(map3k=1, vemurafenib=None, ras=2)";
  substanceOnly species __s54 in default = 0; __s54 is "BRAF(vemurafenib=None, V600='WT', map3k=1, ras=None) ._br_KRAS(activity='active', map3k=2) ._br_RAF1(map3k=1, vemurafenib=3, ras=2) ._br_vemurafenib(map3k=3)";
  substanceOnly species __s55 in default = 0; __s55 is "BRAF(vemurafenib=2, V600='WT', map3k=1, ras=None) ._br_KRAS(activity='active', map3k=3) ._br_RAF1(map3k=1, vemurafenib=None, ras=3) ._br_vemurafenib(map3k=2)";
  substanceOnly species __s56 in default = 0; __s56 is "BRAF(vemurafenib=2, V600='WT', map3k=1, ras=None) ._br_KRAS(activity='active', map3k=3) ._br_RAF1(map3k=1, vemurafenib=4, ras=3) ._br_vemurafenib(map3k=2) ._br_vemurafenib(map3k=4)";
  substanceOnly species __s57 in default = 0; __s57 is "BRAF(vemurafenib=None, V600='WT', map3k=1, ras=2) ._br_KRAS(activity='active', map3k=2) ._br_KRAS(activity='active', map3k=3) ._br_RAF1(map3k=1, vemurafenib=None, ras=3)";
  substanceOnly species __s58 in default = 0; __s58 is "BRAF(vemurafenib=None, V600='WT', map3k=1, ras=2) ._br_KRAS(activity='active', map3k=2) ._br_KRAS(activity='active', map3k=3) ._br_RAF1(map3k=1, vemurafenib=4, ras=3) ._br_vemurafenib(map3k=4)";
  substanceOnly species __s59 in default = 0; __s59 is "BRAF(vemurafenib=3, V600='WT', map3k=1, ras=2) ._br_KRAS(activity='active', map3k=2) ._br_KRAS(activity='active', map3k=4) ._br_RAF1(map3k=1, vemurafenib=None, ras=4) ._br_vemurafenib(map3k=3)";
  substanceOnly species __s60 in default = 0; __s60 is "BRAF(vemurafenib=3, V600='WT', map3k=1, ras=2) ._br_KRAS(activity='active', map3k=2) ._br_KRAS(activity='active', map3k=4) ._br_RAF1(map3k=1, vemurafenib=5, ras=4) ._br_vemurafenib(map3k=3) ._br_vemurafenib(map3k=5)";
  substanceOnly species __s61 in default = 0; __s61 is "BRAF(vemurafenib=None, V600='WT', map3k=1, ras=2) ._br_KRAS(activity='active', map3k=2) ._br_RAF1(map3k=1, vemurafenib=None, ras=None)";
  substanceOnly species __s62 in default = 0; __s62 is "BRAF(vemurafenib=None, V600='WT', map3k=1, ras=2) ._br_KRAS(activity='active', map3k=2) ._br_RAF1(map3k=1, vemurafenib=3, ras=None) ._br_vemurafenib(map3k=3)";
  substanceOnly species __s63 in default = 0; __s63 is "BRAF(vemurafenib=3, V600='WT', map3k=1, ras=2) ._br_KRAS(activity='active', map3k=2) ._br_RAF1(map3k=1, vemurafenib=None, ras=None) ._br_vemurafenib(map3k=3)";
  substanceOnly species __s64 in default = 0; __s64 is "BRAF(vemurafenib=3, V600='WT', map3k=1, ras=2) ._br_KRAS(activity='active', map3k=2) ._br_RAF1(map3k=1, vemurafenib=4, ras=None) ._br_vemurafenib(map3k=3) ._br_vemurafenib(map3k=4)";
  substanceOnly species __s65 in default = 0; __s65 is "BRAF(vemurafenib=None, V600='WT', map3k=1, ras=None) ._br_BRAF(vemurafenib=None, V600='WT', map3k=1, ras=None)";
  substanceOnly species __s66 in default = 0; __s66 is "BRAF(vemurafenib=2, V600='WT', map3k=1, ras=None) ._br_BRAF(vemurafenib=None, V600='WT', map3k=1, ras=None) ._br_vemurafenib(map3k=2)";
  substanceOnly species __s67 in default = 0; __s67 is "BRAF(vemurafenib=2, V600='WT', map3k=1, ras=None) ._br_BRAF(vemurafenib=3, V600='WT', map3k=1, ras=None) ._br_vemurafenib(map3k=3) ._br_vemurafenib(map3k=2)";
  substanceOnly species __s68 in default = 0; __s68 is "BRAF(vemurafenib=None, V600='WT', map3k=1, ras=None) ._br_RAF1(map3k=1, vemurafenib=None, ras=None)";
  substanceOnly species __s69 in default = 0; __s69 is "BRAF(vemurafenib=None, V600='WT', map3k=1, ras=None) ._br_RAF1(map3k=1, vemurafenib=2, ras=None) ._br_vemurafenib(map3k=2)";
  substanceOnly species __s70 in default = 0; __s70 is "BRAF(vemurafenib=2, V600='WT', map3k=1, ras=None) ._br_RAF1(map3k=1, vemurafenib=None, ras=None) ._br_vemurafenib(map3k=2)";
  substanceOnly species __s71 in default = 0; __s71 is "BRAF(vemurafenib=2, V600='WT', map3k=1, ras=None) ._br_RAF1(map3k=1, vemurafenib=3, ras=None) ._br_vemurafenib(map3k=2) ._br_vemurafenib(map3k=3)";
  substanceOnly species __s72 in default = 0; __s72 is "MAP2K1(phospho='p')";
  substanceOnly species __s73 in default = 0; __s73 is "MAPK1(phospho='p')";

  // Parameters:
  kf_sk_act_1 = 1e-6;
  kf_vb_bind_1 = 1e-6;
  kr_vb_bind_1 = 0.1;
  kf_vr_bind_1 = 1e-6;
  kr_vr_bind_1 = 0.1;
  kf_bb_bind_1 = 1e-6;
  kr_bb_bind_1 = 0.1;
  kf_bk_bind_1 = 1e-6;
  kr_bk_bind_1 = 0.1;
  kf_br_bind_1 = 1e-6;
  kr_br_bind_1 = 0.1;
  kf_br_bind_2 = 1e-6;
  kr_br_bind_2 = 0.1;
  kf_sg_bind_1 = 1e-6;
  kr_sg_bind_1 = 0.1;
  kf_ee_bind_1 = 1e-6;
  kr_ee_bind_1 = 0.1;
  kf_ee_bind_2 = 1e-6;
  kr_ee_bind_2 = 0.1;
  kf_eg_bind_1 = 1e-6;
  kr_eg_bind_1 = 0.1;
  kf_kr_bind_1 = 1e-6;
  kr_kr_bind_1 = 0.1;
  kf_e_deg_1 = 2e-5;
  kf_dm_phosphorylation_1 = 1e-6;
  kf_ms_synth_1 = 0.0002;
  kf_md_synth_1 = 0.0002;
  kf_me_synth_1 = 0.0002;
  kf_bm_phosphorylation_1 = 1e-6;
  kf_bm_phosphorylation_2 = 1e-6;
  kf_bm_phosphorylation_3 = 1e-6;
  kf_mm_phosphorylation_1 = 1e-6;
  kf_rm_phosphorylation_1 = 1e-6;
  SOS1_0 = 10000;
  GRB2_0 = 10000;
  KRAS_0 = 10000;
  BRAF_0 = 10000;
  vemurafenib_0 = 10000;
  RAF1_0 = 10000;
  EGFR_0 = 10000;
  EGF_0 = 10000;
  DUSP6_0 = 10000;
  MAPK1_0 = 10000;
  SPRY4_0 = 10000;
  MAP2K1_0 = 10000;

  // Reactions:
  r0: __s3 + __s4 -> __s12; -(__s12*kr_vb_bind_1) + __s3*__s4*kf_vb_bind_1; r0 is "vemurafenib_BRAF_bind + vemurafenib_BRAF_dissociate";
  r1: __s4 + __s5 -> __s13; -(__s13*kr_vr_bind_1) + __s4*__s5*kf_vr_bind_1; r1 is "vemurafenib_RAF1_bind + vemurafenib_RAF1_dissociate";
  r2: __s6 + __s7 -> __s14; -(__s14*kr_ee_bind_1) + __s6*__s7*kf_ee_bind_1; r2 is "EGF_EGFR_bind + EGF_EGFR_dissociate";
  r3: __s6 + __s14 -> __s15; __s14*__s6*kf_ee_bind_2 - __s15*kr_ee_bind_2; r3 is "EGFR_EGFR_EGF_bind + EGFR_EGFR_dissociate";
  r4: __s14 + __s14 -> __s16; __s14^2*kf_ee_bind_2 - __s16*kr_ee_bind_2; r4 is "EGFR_EGFR_EGF_bind + EGFR_EGFR_dissociate";
  r5: __s7 + __s15 -> __s16; __s15*__s7*kf_ee_bind_1 - 2*__s16*kr_ee_bind_1; r5 is "EGF_EGFR_bind + EGF_EGFR_dissociate";
  r6: __s15 -> __s7 + __s17; __s15*kr_ee_bind_1 - 2*__s17*__s7*kf_ee_bind_1; r6 is "EGF_EGFR_dissociate + EGF_EGFR_bind";
  r7: __s1 + __s15 -> __s18; __s1*__s15*kf_eg_bind_1 - __s18*kr_eg_bind_1; r7 is "EGFR_EGFR_GRB2_bind + EGFR_GRB2_dissociate";
  r8: __s1 + __s15 -> __s19; __s1*__s15*kf_eg_bind_1 - __s19*kr_eg_bind_1; r8 is "EGFR_EGFR_GRB2_bind + EGFR_GRB2_dissociate";
  r9: __s1 + __s16 -> __s20; 2*__s1*__s16*kf_eg_bind_1 - __s20*kr_eg_bind_1; r9 is "EGFR_EGFR_GRB2_bind + EGFR_GRB2_dissociate";
  r10: __s0 + __s18 -> __s21; __s0*__s18*kf_sg_bind_1 - __s21*kr_sg_bind_1; r10 is "SOS1_GRB2_EGFR_bind + SOS1_GRB2_dissociate";
  r11: __s0 + __s19 -> __s22; __s0*__s19*kf_sg_bind_1 - __s22*kr_sg_bind_1; r11 is "SOS1_GRB2_EGFR_bind + SOS1_GRB2_dissociate";
  r12: __s0 + __s20 -> __s23; __s0*__s20*kf_sg_bind_1 - __s23*kr_sg_bind_1; r12 is "SOS1_GRB2_EGFR_bind + SOS1_GRB2_dissociate";
  r13: __s7 + __s18 -> __s20; __s18*__s7*kf_ee_bind_1 - __s20*kr_ee_bind_1; r13 is "EGF_EGFR_bind + EGF_EGFR_dissociate";
  r14: __s7 + __s19 -> __s20; __s19*__s7*kf_ee_bind_1 - __s20*kr_ee_bind_1; r14 is "EGF_EGFR_bind + EGF_EGFR_dissociate";
  r15: __s18 -> __s7 + __s24; __s18*kr_ee_bind_1 - __s24*__s7*kf_ee_bind_1; r15 is "EGF_EGFR_dissociate + EGF_EGFR_bind";
  r16: __s19 -> __s7 + __s24; __s19*kr_ee_bind_1 - __s24*__s7*kf_ee_bind_1; r16 is "EGF_EGFR_dissociate + EGF_EGFR_bind";
  r17: __s17 => __s6 + __s6; __s17*kr_ee_bind_2; r17 is "EGFR_EGFR_dissociate";
  r18: __s18 -> __s6 + __s25; __s18*kr_ee_bind_2 - __s25*__s6*kf_ee_bind_2; r18 is "EGFR_EGFR_dissociate + EGFR_EGFR_EGF_bind";
  r19: __s19 -> __s14 + __s26; -(__s14*__s26*kf_ee_bind_2) + __s19*kr_ee_bind_2; r19 is "EGFR_EGFR_dissociate + EGFR_EGFR_EGF_bind";
  r20: __s20 -> __s14 + __s25; -(2*__s14*__s25*kf_ee_bind_2) + __s20*kr_ee_bind_2; r20 is "EGFR_EGFR_dissociate + EGFR_EGFR_EGF_bind";
  r21: __s1 + __s17 -> __s24; 2*__s1*__s17*kf_eg_bind_1 - __s24*kr_eg_bind_1; r21 is "EGFR_EGFR_GRB2_bind + EGFR_GRB2_dissociate";
  r22: __s1 + __s18 -> __s27; __s1*__s18*kf_eg_bind_1 - __s27*kr_eg_bind_1; r22 is "EGFR_EGFR_GRB2_bind + EGFR_GRB2_dissociate";
  r23: __s1 + __s19 -> __s27; __s1*__s19*kf_eg_bind_1 - __s27*kr_eg_bind_1; r23 is "EGFR_EGFR_GRB2_bind + EGFR_GRB2_dissociate";
  r24: __s1 + __s20 -> __s28; __s1*__s20*kf_eg_bind_1 - 2*__s28*kr_eg_bind_1; r24 is "EGFR_EGFR_GRB2_bind + EGFR_GRB2_dissociate";
  r25: __s18 => ; __s18*kf_e_deg_1; r25 is "EGFR_GRB2_degraded";
  r26: __s19 => ; __s19*kf_e_deg_1; r26 is "EGFR_GRB2_degraded";
  r27: __s20 => ; __s20*kf_e_deg_1; r27 is "EGFR_GRB2_degraded";
  r28: __s2 + __s21 => __s21 + __s29; __s2*__s21*kf_sk_act_1; r28 is "SOS1_GRB2_activates_KRAS_activity";
  r29: __s2 + __s22 => __s22 + __s29; __s2*__s22*kf_sk_act_1; r29 is "SOS1_GRB2_activates_KRAS_activity";
  r30: __s2 + __s23 => __s23 + __s29; __s2*__s23*kf_sk_act_1; r30 is "SOS1_GRB2_activates_KRAS_activity";
  r31: __s0 + __s24 -> __s30; __s0*__s24*kf_sg_bind_1 - __s30*kr_sg_bind_1; r31 is "SOS1_GRB2_EGFR_bind + SOS1_GRB2_dissociate";
  r32: __s0 + __s25 -> __s31; __s0*__s25*kf_sg_bind_1 - __s31*kr_sg_bind_1; r32 is "SOS1_GRB2_EGFR_bind + SOS1_GRB2_dissociate";
  r33: __s0 + __s26 -> __s32; __s0*__s26*kf_sg_bind_1 - __s32*kr_sg_bind_1; r33 is "SOS1_GRB2_EGFR_bind + SOS1_GRB2_dissociate";
  r34: __s0 + __s27 -> __s33; __s0*__s27*kf_sg_bind_1 - __s33*kr_sg_bind_1; r34 is "SOS1_GRB2_EGFR_bind + SOS1_GRB2_dissociate";
  r35: __s0 + __s27 -> __s34; __s0*__s27*kf_sg_bind_1 - __s34*kr_sg_bind_1; r35 is "SOS1_GRB2_EGFR_bind + SOS1_GRB2_dissociate";
  r36: __s0 + __s28 -> __s35; 2*__s0*__s28*kf_sg_bind_1 - __s35*kr_sg_bind_1; r36 is "SOS1_GRB2_EGFR_bind + SOS1_GRB2_dissociate";
  r37: __s7 + __s21 -> __s23; __s21*__s7*kf_ee_bind_1 - __s23*kr_ee_bind_1; r37 is "EGF_EGFR_bind + EGF_EGFR_dissociate";
  r38: __s7 + __s22 -> __s23; __s22*__s7*kf_ee_bind_1 - __s23*kr_ee_bind_1; r38 is "EGF_EGFR_bind + EGF_EGFR_dissociate";
  r39: __s7 + __s26 -> __s25; -(__s25*kr_ee_bind_1) + __s26*__s7*kf_ee_bind_1; r39 is "EGF_EGFR_bind + EGF_EGFR_dissociate";
  r40: __s7 + __s27 -> __s28; __s27*__s7*kf_ee_bind_1 - 2*__s28*kr_ee_bind_1; r40 is "EGF_EGFR_bind + EGF_EGFR_dissociate";
  r41: __s21 -> __s7 + __s30; __s21*kr_ee_bind_1 - __s30*__s7*kf_ee_bind_1; r41 is "EGF_EGFR_dissociate + EGF_EGFR_bind";
  r42: __s22 -> __s7 + __s30; __s22*kr_ee_bind_1 - __s30*__s7*kf_ee_bind_1; r42 is "EGF_EGFR_dissociate + EGF_EGFR_bind";
  r43: __s27 -> __s7 + __s36; __s27*kr_ee_bind_1 - 2*__s36*__s7*kf_ee_bind_1; r43 is "EGF_EGFR_dissociate + EGF_EGFR_bind";
  r44: __s25 + __s25 -> __s28; __s25^2*kf_ee_bind_2 - __s28*kr_ee_bind_2; r44 is "EGFR_EGFR_EGF_bind + EGFR_EGFR_dissociate";
  r45: __s25 + __s26 -> __s27; __s25*__s26*kf_ee_bind_2 - __s27*kr_ee_bind_2; r45 is "EGFR_EGFR_EGF_bind + EGFR_EGFR_dissociate";
  r46: __s21 -> __s6 + __s31; __s21*kr_ee_bind_2 - __s31*__s6*kf_ee_bind_2; r46 is "EGFR_EGFR_dissociate + EGFR_EGFR_EGF_bind";
  r47: __s22 -> __s14 + __s32; -(__s14*__s32*kf_ee_bind_2) + __s22*kr_ee_bind_2; r47 is "EGFR_EGFR_dissociate + EGFR_EGFR_EGF_bind";
  r48: __s23 -> __s14 + __s31; -(2*__s14*__s31*kf_ee_bind_2) + __s23*kr_ee_bind_2; r48 is "EGFR_EGFR_dissociate + EGFR_EGFR_EGF_bind";
  r49: __s24 => __s6 + __s26; __s24*kr_ee_bind_2; r49 is "EGFR_EGFR_dissociate";
  r50: __s1 + __s21 -> __s33; __s1*__s21*kf_eg_bind_1 - __s33*kr_eg_bind_1; r50 is "EGFR_EGFR_GRB2_bind + EGFR_GRB2_dissociate";
  r51: __s1 + __s22 -> __s34; __s1*__s22*kf_eg_bind_1 - __s34*kr_eg_bind_1; r51 is "EGFR_EGFR_GRB2_bind + EGFR_GRB2_dissociate";
  r52: __s1 + __s23 -> __s35; __s1*__s23*kf_eg_bind_1 - __s35*kr_eg_bind_1; r52 is "EGFR_EGFR_GRB2_bind + EGFR_GRB2_dissociate";
  r53: __s1 + __s24 -> __s36; __s1*__s24*kf_eg_bind_1 - 2*__s36*kr_eg_bind_1; r53 is "EGFR_EGFR_GRB2_bind + EGFR_GRB2_dissociate";
  r54: __s21 -> __s15 + __s37; -(__s15*__s37*kf_eg_bind_1) + __s21*kr_eg_bind_1; r54 is "EGFR_GRB2_dissociate + EGFR_EGFR_GRB2_bind";
  r55: __s22 -> __s15 + __s37; -(__s15*__s37*kf_eg_bind_1) + __s22*kr_eg_bind_1; r55 is "EGFR_GRB2_dissociate + EGFR_EGFR_GRB2_bind";
  r56: __s23 -> __s16 + __s37; -(2*__s16*__s37*kf_eg_bind_1) + __s23*kr_eg_bind_1; r56 is "EGFR_GRB2_dissociate + EGFR_EGFR_GRB2_bind";
  r57: __s25 => __s1 + __s14; __s25*kr_eg_bind_1; r57 is "EGFR_GRB2_dissociate";
  r58: __s26 => __s1 + __s6; __s26*kr_eg_bind_1; r58 is "EGFR_GRB2_dissociate";
  r59: __s21 => ; __s21*kf_e_deg_1; r59 is "EGFR_GRB2_degraded";
  r60: __s22 => ; __s22*kf_e_deg_1; r60 is "EGFR_GRB2_degraded";
  r61: __s23 => ; __s23*kf_e_deg_1; r61 is "EGFR_GRB2_degraded";
  r62: __s24 => ; __s24*kf_e_deg_1; r62 is "EGFR_GRB2_degraded";
  r63: __s25 => ; __s25*kf_e_deg_1; r63 is "EGFR_GRB2_degraded";
  r64: __s26 => ; __s26*kf_e_deg_1; r64 is "EGFR_GRB2_degraded";
  r65: __s27 => ; __s27*kf_e_deg_1; r65 is "EGFR_GRB2_degraded";
  r66: __s28 => ; __s28*kf_e_deg_1; r66 is "EGFR_GRB2_degraded";
  r67: __s2 + __s30 => __s29 + __s30; __s2*__s30*kf_sk_act_1; r67 is "SOS1_GRB2_activates_KRAS_activity";
  r68: __s2 + __s31 => __s29 + __s31; __s2*__s31*kf_sk_act_1; r68 is "SOS1_GRB2_activates_KRAS_activity";
  r69: __s2 + __s32 => __s29 + __s32; __s2*__s32*kf_sk_act_1; r69 is "SOS1_GRB2_activates_KRAS_activity";
  r70: __s2 + __s33 => __s29 + __s33; __s2*__s33*kf_sk_act_1; r70 is "SOS1_GRB2_activates_KRAS_activity";
  r71: __s2 + __s34 => __s29 + __s34; __s2*__s34*kf_sk_act_1; r71 is "SOS1_GRB2_activates_KRAS_activity";
  r72: __s2 + __s35 => __s29 + __s35; __s2*__s35*kf_sk_act_1; r72 is "SOS1_GRB2_activates_KRAS_activity";
  r73: __s2 + __s37 => __s29 + __s37; __s2*__s37*kf_sk_act_1; r73 is "SOS1_GRB2_activates_KRAS_activity";
  r74: __s3 + __s29 -> __s38; __s29*__s3*kf_bk_bind_1 - __s38*kr_bk_bind_1; r74 is "BRAF_KRAS_act_bind + BRAF_KRAS_dissociate";
  r75: __s12 + __s29 -> __s39; __s12*__s29*kf_bk_bind_1 - __s39*kr_bk_bind_1; r75 is "BRAF_KRAS_act_bind + BRAF_KRAS_dissociate";
  r76: __s0 + __s33 -> __s40; __s0*__s33*kf_sg_bind_1 - __s40*kr_sg_bind_1; r76 is "SOS1_GRB2_EGFR_bind + SOS1_GRB2_dissociate";
  r77: __s0 + __s34 -> __s40; __s0*__s34*kf_sg_bind_1 - __s40*kr_sg_bind_1; r77 is "SOS1_GRB2_EGFR_bind + SOS1_GRB2_dissociate";
  r78: __s0 + __s35 -> __s41; __s0*__s35*kf_sg_bind_1 - 2*__s41*kr_sg_bind_1; r78 is "SOS1_GRB2_EGFR_bind + SOS1_GRB2_dissociate";
  r79: __s0 + __s36 -> __s42; 2*__s0*__s36*kf_sg_bind_1 - __s42*kr_sg_bind_1; r79 is "SOS1_GRB2_EGFR_bind + SOS1_GRB2_dissociate";
  SOS1_GRB2_dissociate: __s37 => __s0 + __s1; __s37*kr_sg_bind_1;
  r81: __s7 + __s32 -> __s31; -(__s31*kr_ee_bind_1) + __s32*__s7*kf_ee_bind_1; r81 is "EGF_EGFR_bind + EGF_EGFR_dissociate";
  r82: __s7 + __s33 -> __s35; __s33*__s7*kf_ee_bind_1 - __s35*kr_ee_bind_1; r82 is "EGF_EGFR_bind + EGF_EGFR_dissociate";
  r83: __s7 + __s34 -> __s35; __s34*__s7*kf_ee_bind_1 - __s35*kr_ee_bind_1; r83 is "EGF_EGFR_bind + EGF_EGFR_dissociate";
  r84: __s33 -> __s7 + __s42; __s33*kr_ee_bind_1 - __s42*__s7*kf_ee_bind_1; r84 is "EGF_EGFR_dissociate + EGF_EGFR_bind";
  r85: __s34 -> __s7 + __s42; __s34*kr_ee_bind_1 - __s42*__s7*kf_ee_bind_1; r85 is "EGF_EGFR_dissociate + EGF_EGFR_bind";
  r86: __s25 + __s31 -> __s35; 2*__s25*__s31*kf_ee_bind_2 - __s35*kr_ee_bind_2; r86 is "EGFR_EGFR_EGF_bind + EGFR_EGFR_dissociate";
  r87: __s26 + __s31 -> __s33; __s26*__s31*kf_ee_bind_2 - __s33*kr_ee_bind_2; r87 is "EGFR_EGFR_EGF_bind + EGFR_EGFR_dissociate";
  r88: __s31 + __s31 -> __s41; __s31^2*kf_ee_bind_2 - __s41*kr_ee_bind_2; r88 is "EGFR_EGFR_EGF_bind + EGFR_EGFR_dissociate";
  r89: __s25 + __s32 -> __s34; __s25*__s32*kf_ee_bind_2 - __s34*kr_ee_bind_2; r89 is "EGFR_EGFR_EGF_bind + EGFR_EGFR_dissociate";
  r90: __s31 + __s32 -> __s40; __s31*__s32*kf_ee_bind_2 - __s40*kr_ee_bind_2; r90 is "EGFR_EGFR_EGF_bind + EGFR_EGFR_dissociate";
  r91: __s30 => __s6 + __s32; __s30*kr_ee_bind_2; r91 is "EGFR_EGFR_dissociate";
  r92: __s36 => __s26 + __s26; __s36*kr_ee_bind_2; r92 is "EGFR_EGFR_dissociate";
  r93: __s17 + __s37 -> __s30; 2*__s17*__s37*kf_eg_bind_1 - __s30*kr_eg_bind_1; r93 is "EGFR_EGFR_GRB2_bind + EGFR_GRB2_dissociate";
  r94: __s18 + __s37 -> __s34; __s18*__s37*kf_eg_bind_1 - __s34*kr_eg_bind_1; r94 is "EGFR_EGFR_GRB2_bind + EGFR_GRB2_dissociate";
  r95: __s19 + __s37 -> __s33; __s19*__s37*kf_eg_bind_1 - __s33*kr_eg_bind_1; r95 is "EGFR_EGFR_GRB2_bind + EGFR_GRB2_dissociate";
  r96: __s20 + __s37 -> __s35; __s20*__s37*kf_eg_bind_1 - __s35*kr_eg_bind_1; r96 is "EGFR_EGFR_GRB2_bind + EGFR_GRB2_dissociate";
  r97: __s21 + __s37 -> __s40; __s21*__s37*kf_eg_bind_1 - __s40*kr_eg_bind_1; r97 is "EGFR_EGFR_GRB2_bind + EGFR_GRB2_dissociate";
  r98: __s22 + __s37 -> __s40; __s22*__s37*kf_eg_bind_1 - __s40*kr_eg_bind_1; r98 is "EGFR_EGFR_GRB2_bind + EGFR_GRB2_dissociate";
  r99: __s23 + __s37 -> __s41; __s23*__s37*kf_eg_bind_1 - 2*__s41*kr_eg_bind_1; r99 is "EGFR_EGFR_GRB2_bind + EGFR_GRB2_dissociate";
  r100: __s24 + __s37 -> __s42; __s24*__s37*kf_eg_bind_1 - __s42*kr_eg_bind_1; r100 is "EGFR_EGFR_GRB2_bind + EGFR_GRB2_dissociate";
  r101: __s1 + __s30 -> __s42; __s1*__s30*kf_eg_bind_1 - __s42*kr_eg_bind_1; r101 is "EGFR_EGFR_GRB2_bind + EGFR_GRB2_dissociate";
  r102: __s30 + __s37 -> __s43; __s30*__s37*kf_eg_bind_1 - 2*__s43*kr_eg_bind_1; r102 is "EGFR_EGFR_GRB2_bind + EGFR_GRB2_dissociate";
  r103: __s31 => __s14 + __s37; __s31*kr_eg_bind_1; r103 is "EGFR_GRB2_dissociate";
  r104: __s32 => __s6 + __s37; __s32*kr_eg_bind_1; r104 is "EGFR_GRB2_dissociate";
  r105: __s5 + __s29 -> __s44; __s29*__s5*kf_kr_bind_1 - __s44*kr_kr_bind_1; r105 is "KRAS_act_RAF1_bind + KRAS_RAF1_dissociate";
  r106: __s13 + __s29 -> __s45; __s13*__s29*kf_kr_bind_1 - __s45*kr_kr_bind_1; r106 is "KRAS_act_RAF1_bind + KRAS_RAF1_dissociate";
  r107: __s30 => ; __s30*kf_e_deg_1; r107 is "EGFR_GRB2_degraded";
  r108: __s31 => ; __s31*kf_e_deg_1; r108 is "EGFR_GRB2_degraded";
  r109: __s32 => ; __s32*kf_e_deg_1; r109 is "EGFR_GRB2_degraded";
  r110: __s33 => ; __s33*kf_e_deg_1; r110 is "EGFR_GRB2_degraded";
  r111: __s34 => ; __s34*kf_e_deg_1; r111 is "EGFR_GRB2_degraded";
  r112: __s35 => ; __s35*kf_e_deg_1; r112 is "EGFR_GRB2_degraded";
  r113: __s36 => ; __s36*kf_e_deg_1; r113 is "EGFR_GRB2_degraded";
  r114: __s2 + __s40 => __s29 + __s40; __s2*__s40*kf_sk_act_1; r114 is "SOS1_GRB2_activates_KRAS_activity";
  r115: __s2 + __s41 => __s29 + __s41; __s2*__s41*kf_sk_act_1; r115 is "SOS1_GRB2_activates_KRAS_activity";
  r116: __s2 + __s42 => __s29 + __s42; __s2*__s42*kf_sk_act_1; r116 is "SOS1_GRB2_activates_KRAS_activity";
  r117: __s2 + __s43 => __s29 + __s43; __s2*__s43*kf_sk_act_1; r117 is "SOS1_GRB2_activates_KRAS_activity";
  r118: __s4 + __s38 -> __s39; __s38*__s4*kf_vb_bind_1 - __s39*kr_vb_bind_1; r118 is "vemurafenib_BRAF_bind + vemurafenib_BRAF_dissociate";
  r119: __s4 + __s44 -> __s45; __s4*__s44*kf_vr_bind_1 - __s45*kr_vr_bind_1; r119 is "vemurafenib_RAF1_bind + vemurafenib_RAF1_dissociate";
  r120: __s3 + __s38 -> __s46; __s3*__s38*kf_bb_bind_1 - __s46*kr_bb_bind_1; r120 is "BRAF_BRAF_KRAS_bind + BRAF_BRAF_dissociate";
  r121: __s3 + __s39 -> __s47; __s3*__s39*kf_bb_bind_1 - __s47*kr_bb_bind_1; r121 is "BRAF_BRAF_KRAS_bind + BRAF_BRAF_dissociate";
  r122: __s12 + __s38 -> __s48; __s12*__s38*kf_bb_bind_1 - __s48*kr_bb_bind_1; r122 is "BRAF_BRAF_KRAS_bind + BRAF_BRAF_dissociate";
  r123: __s12 + __s39 -> __s49; __s12*__s39*kf_bb_bind_1 - __s49*kr_bb_bind_1; r123 is "BRAF_BRAF_KRAS_bind + BRAF_BRAF_dissociate";
  r124: __s38 + __s38 -> __s50; __s38^2*kf_bb_bind_1 - __s50*kr_bb_bind_1; r124 is "BRAF_BRAF_KRAS_bind + BRAF_BRAF_dissociate";
  r125: __s38 + __s39 -> __s51; 2*__s38*__s39*kf_bb_bind_1 - __s51*kr_bb_bind_1; r125 is "BRAF_BRAF_KRAS_bind + BRAF_BRAF_dissociate";
  r126: __s39 + __s39 -> __s52; __s39^2*kf_bb_bind_1 - __s52*kr_bb_bind_1; r126 is "BRAF_BRAF_KRAS_bind + BRAF_BRAF_dissociate";
  r127: __s3 + __s44 -> __s53; __s3*__s44*kf_br_bind_1 - __s53*kr_br_bind_1; r127 is "BRAF_RAF1_KRAS_bind + BRAF_RAF1_dissociate";
  r128: __s3 + __s45 -> __s54; __s3*__s45*kf_br_bind_1 - __s54*kr_br_bind_1; r128 is "BRAF_RAF1_KRAS_bind + BRAF_RAF1_dissociate";
  r129: __s12 + __s44 -> __s55; __s12*__s44*kf_br_bind_1 - __s55*kr_br_bind_1; r129 is "BRAF_RAF1_KRAS_bind + BRAF_RAF1_dissociate";
  r130: __s12 + __s45 -> __s56; __s12*__s45*kf_br_bind_1 - __s56*kr_br_bind_1; r130 is "BRAF_RAF1_KRAS_bind + BRAF_RAF1_dissociate";
  r131: __s38 + __s44 -> __s57; __s38*__s44*kf_br_bind_1 + (__s38*__s44*kf_br_bind_2 - __s57*kr_br_bind_1); r131 is "BRAF_RAF1_KRAS_bind + BRAF_KRAS_RAF1_bind + BRAF_RAF1_dissociate";
  r132: __s38 + __s45 -> __s58; __s38*__s45*kf_br_bind_1 + (__s38*__s45*kf_br_bind_2 - __s58*kr_br_bind_1); r132 is "BRAF_RAF1_KRAS_bind + BRAF_KRAS_RAF1_bind + BRAF_RAF1_dissociate";
  r133: __s39 + __s44 -> __s59; __s39*__s44*kf_br_bind_1 + (__s39*__s44*kf_br_bind_2 - __s59*kr_br_bind_1); r133 is "BRAF_RAF1_KRAS_bind + BRAF_KRAS_RAF1_bind + BRAF_RAF1_dissociate";
  r134: __s39 + __s45 -> __s60; __s39*__s45*kf_br_bind_1 + (__s39*__s45*kf_br_bind_2 - __s60*kr_br_bind_1); r134 is "BRAF_RAF1_KRAS_bind + BRAF_KRAS_RAF1_bind + BRAF_RAF1_dissociate";
  r135: __s5 + __s38 -> __s61; __s38*__s5*kf_br_bind_2 - __s61*kr_br_bind_1; r135 is "BRAF_KRAS_RAF1_bind + BRAF_RAF1_dissociate";
  r136: __s13 + __s38 -> __s62; __s13*__s38*kf_br_bind_2 - __s62*kr_br_bind_1; r136 is "BRAF_KRAS_RAF1_bind + BRAF_RAF1_dissociate";
  r137: __s5 + __s39 -> __s63; __s39*__s5*kf_br_bind_2 - __s63*kr_br_bind_1; r137 is "BRAF_KRAS_RAF1_bind + BRAF_RAF1_dissociate";
  r138: __s13 + __s39 -> __s64; __s13*__s39*kf_br_bind_2 - __s64*kr_br_bind_1; r138 is "BRAF_KRAS_RAF1_bind + BRAF_RAF1_dissociate";
  r139: __s0 + __s42 -> __s43; __s0*__s42*kf_sg_bind_1 - 2*__s43*kr_sg_bind_1; r139 is "SOS1_GRB2_EGFR_bind + SOS1_GRB2_dissociate";
  r140: __s7 + __s40 -> __s41; __s40*__s7*kf_ee_bind_1 - 2*__s41*kr_ee_bind_1; r140 is "EGF_EGFR_bind + EGF_EGFR_dissociate";
  r141: __s7 + __s43 -> __s40; -(__s40*kr_ee_bind_1) + 2*__s43*__s7*kf_ee_bind_1; r141 is "EGF_EGFR_bind + EGF_EGFR_dissociate";
  r142: __s42 => __s26 + __s32; __s42*kr_ee_bind_2; r142 is "EGFR_EGFR_dissociate";
  r143: __s43 => __s32 + __s32; __s43*kr_ee_bind_2; r143 is "EGFR_EGFR_dissociate";
  r144: __s40 => ; __s40*kf_e_deg_1; r144 is "EGFR_GRB2_degraded";
  r145: __s41 => ; __s41*kf_e_deg_1; r145 is "EGFR_GRB2_degraded";
  r146: __s42 => ; __s42*kf_e_deg_1; r146 is "EGFR_GRB2_degraded";
  r147: __s43 => ; __s43*kf_e_deg_1; r147 is "EGFR_GRB2_degraded";
  r148: __s4 + __s46 -> __s47; __s4*__s46*kf_vb_bind_1 - __s47*kr_vb_bind_1; r148 is "vemurafenib_BRAF_bind + vemurafenib_BRAF_dissociate";
  r149: __s4 + __s46 -> __s48; __s4*__s46*kf_vb_bind_1 - __s48*kr_vb_bind_1; r149 is "vemurafenib_BRAF_bind + vemurafenib_BRAF_dissociate";
  r150: __s4 + __s47 -> __s49; __s4*__s47*kf_vb_bind_1 - __s49*kr_vb_bind_1; r150 is "vemurafenib_BRAF_bind + vemurafenib_BRAF_dissociate";
  r151: __s4 + __s48 -> __s49; __s4*__s48*kf_vb_bind_1 - __s49*kr_vb_bind_1; r151 is "vemurafenib_BRAF_bind + vemurafenib_BRAF_dissociate";
  r152: __s4 + __s50 -> __s51; 2*__s4*__s50*kf_vb_bind_1 - __s51*kr_vb_bind_1; r152 is "vemurafenib_BRAF_bind + vemurafenib_BRAF_dissociate";
  r153: __s4 + __s51 -> __s52; __s4*__s51*kf_vb_bind_1 - 2*__s52*kr_vb_bind_1; r153 is "vemurafenib_BRAF_bind + vemurafenib_BRAF_dissociate";
  r154: __s4 + __s53 -> __s55; __s4*__s53*kf_vb_bind_1 - __s55*kr_vb_bind_1; r154 is "vemurafenib_BRAF_bind + vemurafenib_BRAF_dissociate";
  r155: __s4 + __s54 -> __s56; __s4*__s54*kf_vb_bind_1 - __s56*kr_vb_bind_1; r155 is "vemurafenib_BRAF_bind + vemurafenib_BRAF_dissociate";
  r156: __s4 + __s57 -> __s59; __s4*__s57*kf_vb_bind_1 - __s59*kr_vb_bind_1; r156 is "vemurafenib_BRAF_bind + vemurafenib_BRAF_dissociate";
  r157: __s4 + __s58 -> __s60; __s4*__s58*kf_vb_bind_1 - __s60*kr_vb_bind_1; r157 is "vemurafenib_BRAF_bind + vemurafenib_BRAF_dissociate";
  r158: __s4 + __s61 -> __s63; __s4*__s61*kf_vb_bind_1 - __s63*kr_vb_bind_1; r158 is "vemurafenib_BRAF_bind + vemurafenib_BRAF_dissociate";
  r159: __s4 + __s62 -> __s64; __s4*__s62*kf_vb_bind_1 - __s64*kr_vb_bind_1; r159 is "vemurafenib_BRAF_bind + vemurafenib_BRAF_dissociate";
  r160: __s4 + __s53 -> __s54; __s4*__s53*kf_vr_bind_1 - __s54*kr_vr_bind_1; r160 is "vemurafenib_RAF1_bind + vemurafenib_RAF1_dissociate";
  r161: __s4 + __s55 -> __s56; __s4*__s55*kf_vr_bind_1 - __s56*kr_vr_bind_1; r161 is "vemurafenib_RAF1_bind + vemurafenib_RAF1_dissociate";
  r162: __s4 + __s57 -> __s58; __s4*__s57*kf_vr_bind_1 - __s58*kr_vr_bind_1; r162 is "vemurafenib_RAF1_bind + vemurafenib_RAF1_dissociate";
  r163: __s4 + __s59 -> __s60; __s4*__s59*kf_vr_bind_1 - __s60*kr_vr_bind_1; r163 is "vemurafenib_RAF1_bind + vemurafenib_RAF1_dissociate";
  r164: __s4 + __s61 -> __s62; __s4*__s61*kf_vr_bind_1 - __s62*kr_vr_bind_1; r164 is "vemurafenib_RAF1_bind + vemurafenib_RAF1_dissociate";
  r165: __s4 + __s63 -> __s64; __s4*__s63*kf_vr_bind_1 - __s64*kr_vr_bind_1; r165 is "vemurafenib_RAF1_bind + vemurafenib_RAF1_dissociate";
  r166: __s29 + __s46 -> __s50; __s29*__s46*kf_bk_bind_1 - 2*__s50*kr_bk_bind_1; r166 is "BRAF_KRAS_act_bind + BRAF_KRAS_dissociate";
  r167: __s29 + __s47 -> __s51; __s29*__s47*kf_bk_bind_1 - __s51*kr_bk_bind_1; r167 is "BRAF_KRAS_act_bind + BRAF_KRAS_dissociate";
  r168: __s29 + __s48 -> __s51; __s29*__s48*kf_bk_bind_1 - __s51*kr_bk_bind_1; r168 is "BRAF_KRAS_act_bind + BRAF_KRAS_dissociate";
  r169: __s29 + __s49 -> __s52; __s29*__s49*kf_bk_bind_1 - 2*__s52*kr_bk_bind_1; r169 is "BRAF_KRAS_act_bind + BRAF_KRAS_dissociate";
  r170: __s29 + __s53 -> __s57; __s29*__s53*kf_bk_bind_1 - __s57*kr_bk_bind_1; r170 is "BRAF_KRAS_act_bind + BRAF_KRAS_dissociate";
  r171: __s29 + __s54 -> __s58; __s29*__s54*kf_bk_bind_1 - __s58*kr_bk_bind_1; r171 is "BRAF_KRAS_act_bind + BRAF_KRAS_dissociate";
  r172: __s29 + __s55 -> __s59; __s29*__s55*kf_bk_bind_1 - __s59*kr_bk_bind_1; r172 is "BRAF_KRAS_act_bind + BRAF_KRAS_dissociate";
  r173: __s29 + __s56 -> __s60; __s29*__s56*kf_bk_bind_1 - __s60*kr_bk_bind_1; r173 is "BRAF_KRAS_act_bind + BRAF_KRAS_dissociate";
  r174: __s46 -> __s29 + __s65; -(2*__s29*__s65*kf_bk_bind_1) + __s46*kr_bk_bind_1; r174 is "BRAF_KRAS_dissociate + BRAF_KRAS_act_bind";
  r175: __s47 -> __s29 + __s66; -(__s29*__s66*kf_bk_bind_1) + __s47*kr_bk_bind_1; r175 is "BRAF_KRAS_dissociate + BRAF_KRAS_act_bind";
  r176: __s48 -> __s29 + __s66; -(__s29*__s66*kf_bk_bind_1) + __s48*kr_bk_bind_1; r176 is "BRAF_KRAS_dissociate + BRAF_KRAS_act_bind";
  r177: __s49 -> __s29 + __s67; -(2*__s29*__s67*kf_bk_bind_1) + __s49*kr_bk_bind_1; r177 is "BRAF_KRAS_dissociate + BRAF_KRAS_act_bind";
  r178: __s61 -> __s29 + __s68; -(__s29*__s68*kf_bk_bind_1) + __s61*kr_bk_bind_1; r178 is "BRAF_KRAS_dissociate + BRAF_KRAS_act_bind";
  r179: __s62 -> __s29 + __s69; -(__s29*__s69*kf_bk_bind_1) + __s62*kr_bk_bind_1; r179 is "BRAF_KRAS_dissociate + BRAF_KRAS_act_bind";
  r180: __s63 -> __s29 + __s70; -(__s29*__s70*kf_bk_bind_1) + __s63*kr_bk_bind_1; r180 is "BRAF_KRAS_dissociate + BRAF_KRAS_act_bind";
  r181: __s64 -> __s29 + __s71; -(__s29*__s71*kf_bk_bind_1) + __s64*kr_bk_bind_1; r181 is "BRAF_KRAS_dissociate + BRAF_KRAS_act_bind";
  r182: __s29 + __s61 -> __s57; __s29*__s61*kf_kr_bind_1 - __s57*kr_kr_bind_1; r182 is "KRAS_act_RAF1_bind + KRAS_RAF1_dissociate";
  r183: __s29 + __s62 -> __s58; __s29*__s62*kf_kr_bind_1 - __s58*kr_kr_bind_1; r183 is "KRAS_act_RAF1_bind + KRAS_RAF1_dissociate";
  r184: __s29 + __s63 -> __s59; __s29*__s63*kf_kr_bind_1 - __s59*kr_kr_bind_1; r184 is "KRAS_act_RAF1_bind + KRAS_RAF1_dissociate";
  r185: __s29 + __s64 -> __s60; __s29*__s64*kf_kr_bind_1 - __s60*kr_kr_bind_1; r185 is "KRAS_act_RAF1_bind + KRAS_RAF1_dissociate";
  r186: __s53 -> __s29 + __s68; -(__s29*__s68*kf_kr_bind_1) + __s53*kr_kr_bind_1; r186 is "KRAS_RAF1_dissociate + KRAS_act_RAF1_bind";
  r187: __s54 -> __s29 + __s69; -(__s29*__s69*kf_kr_bind_1) + __s54*kr_kr_bind_1; r187 is "KRAS_RAF1_dissociate + KRAS_act_RAF1_bind";
  r188: __s55 -> __s29 + __s70; -(__s29*__s70*kf_kr_bind_1) + __s55*kr_kr_bind_1; r188 is "KRAS_RAF1_dissociate + KRAS_act_RAF1_bind";
  r189: __s56 -> __s29 + __s71; -(__s29*__s71*kf_kr_bind_1) + __s56*kr_kr_bind_1; r189 is "KRAS_RAF1_dissociate + KRAS_act_RAF1_bind";
  r190: __s11 + __s46 => __s46 + __s72; __s11*__s46*kf_bm_phosphorylation_2 + __s11*__s46*kf_bm_phosphorylation_3; r190 is "BRAF_BRAF_nvemurafenib_phosphorylation_MAP2K1_phospho + BRAF_RAF1_nvemurafenib_phosphorylation_MAP2K1_phospho";
  r191: __s11 + __s47 => __s47 + __s72; __s11*__s47*kf_bm_phosphorylation_2 + __s11*__s47*kf_bm_phosphorylation_3; r191 is "BRAF_BRAF_nvemurafenib_phosphorylation_MAP2K1_phospho + BRAF_RAF1_nvemurafenib_phosphorylation_MAP2K1_phospho";
  r192: __s11 + __s48 => __s48 + __s72; __s11*__s48*kf_bm_phosphorylation_2 + __s11*__s48*kf_bm_phosphorylation_3; r192 is "BRAF_BRAF_nvemurafenib_phosphorylation_MAP2K1_phospho + BRAF_RAF1_nvemurafenib_phosphorylation_MAP2K1_phospho";
  r193: __s11 + __s50 => __s50 + __s72; __s11*__s50*kf_bm_phosphorylation_2 + __s11*__s50*kf_bm_phosphorylation_3; r193 is "BRAF_BRAF_nvemurafenib_phosphorylation_MAP2K1_phospho + BRAF_RAF1_nvemurafenib_phosphorylation_MAP2K1_phospho";
  r194: __s11 + __s51 => __s51 + __s72; __s11*__s51*kf_bm_phosphorylation_2 + __s11*__s51*kf_bm_phosphorylation_3; r194 is "BRAF_BRAF_nvemurafenib_phosphorylation_MAP2K1_phospho + BRAF_RAF1_nvemurafenib_phosphorylation_MAP2K1_phospho";
  r195: __s11 + __s53 => __s53 + __s72; __s11*__s53*kf_bm_phosphorylation_2 + __s11*__s53*kf_bm_phosphorylation_3 + __s11*__s53*kf_rm_phosphorylation_1; r195 is "BRAF_BRAF_nvemurafenib_phosphorylation_MAP2K1_phospho + BRAF_RAF1_nvemurafenib_phosphorylation_MAP2K1_phospho + RAF1_BRAF_nvemurafenib_phosphorylation_MAP2K1_phospho";
  r196: __s11 + __s54 => __s54 + __s72; __s11*__s54*kf_bm_phosphorylation_2 + __s11*__s54*kf_bm_phosphorylation_3; r196 is "BRAF_BRAF_nvemurafenib_phosphorylation_MAP2K1_phospho + BRAF_RAF1_nvemurafenib_phosphorylation_MAP2K1_phospho";
  r197: __s11 + __s57 => __s57 + __s72; __s11*__s57*kf_bm_phosphorylation_2 + __s11*__s57*kf_bm_phosphorylation_3 + __s11*__s57*kf_rm_phosphorylation_1; r197 is "BRAF_BRAF_nvemurafenib_phosphorylation_MAP2K1_phospho + BRAF_RAF1_nvemurafenib_phosphorylation_MAP2K1_phospho + RAF1_BRAF_nvemurafenib_phosphorylation_MAP2K1_phospho";
  r198: __s11 + __s58 => __s58 + __s72; __s11*__s58*kf_bm_phosphorylation_2 + __s11*__s58*kf_bm_phosphorylation_3; r198 is "BRAF_BRAF_nvemurafenib_phosphorylation_MAP2K1_phospho + BRAF_RAF1_nvemurafenib_phosphorylation_MAP2K1_phospho";
  r199: __s11 + __s61 => __s61 + __s72; __s11*__s61*kf_bm_phosphorylation_2 + __s11*__s61*kf_bm_phosphorylation_3 + __s11*__s61*kf_rm_phosphorylation_1; r199 is "BRAF_BRAF_nvemurafenib_phosphorylation_MAP2K1_phospho + BRAF_RAF1_nvemurafenib_phosphorylation_MAP2K1_phospho + RAF1_BRAF_nvemurafenib_phosphorylation_MAP2K1_phospho";
  r200: __s11 + __s62 => __s62 + __s72; __s11*__s62*kf_bm_phosphorylation_2 + __s11*__s62*kf_bm_phosphorylation_3; r200 is "BRAF_BRAF_nvemurafenib_phosphorylation_MAP2K1_phospho + BRAF_RAF1_nvemurafenib_phosphorylation_MAP2K1_phospho";
  r201: __s11 + __s55 => __s55 + __s72; __s11*__s55*kf_rm_phosphorylation_1; r201 is "RAF1_BRAF_nvemurafenib_phosphorylation_MAP2K1_phospho";
  r202: __s11 + __s59 => __s59 + __s72; __s11*__s59*kf_rm_phosphorylation_1; r202 is "RAF1_BRAF_nvemurafenib_phosphorylation_MAP2K1_phospho";
  r203: __s11 + __s63 => __s63 + __s72; __s11*__s63*kf_rm_phosphorylation_1; r203 is "RAF1_BRAF_nvemurafenib_phosphorylation_MAP2K1_phospho";
  r204: __s4 + __s65 -> __s66; 2*__s4*__s65*kf_vb_bind_1 - __s66*kr_vb_bind_1; r204 is "vemurafenib_BRAF_bind + vemurafenib_BRAF_dissociate";
  r205: __s4 + __s66 -> __s67; __s4*__s66*kf_vb_bind_1 - 2*__s67*kr_vb_bind_1; r205 is "vemurafenib_BRAF_bind + vemurafenib_BRAF_dissociate";
  r206: __s4 + __s68 -> __s70; __s4*__s68*kf_vb_bind_1 - __s70*kr_vb_bind_1; r206 is "vemurafenib_BRAF_bind + vemurafenib_BRAF_dissociate";
  r207: __s4 + __s69 -> __s71; __s4*__s69*kf_vb_bind_1 - __s71*kr_vb_bind_1; r207 is "vemurafenib_BRAF_bind + vemurafenib_BRAF_dissociate";
  r208: __s4 + __s68 -> __s69; __s4*__s68*kf_vr_bind_1 - __s69*kr_vr_bind_1; r208 is "vemurafenib_RAF1_bind + vemurafenib_RAF1_dissociate";
  r209: __s4 + __s70 -> __s71; __s4*__s70*kf_vr_bind_1 - __s71*kr_vr_bind_1; r209 is "vemurafenib_RAF1_bind + vemurafenib_RAF1_dissociate";
  r210: __s65 => __s3 + __s3; __s65*kr_bb_bind_1; r210 is "BRAF_BRAF_dissociate";
  r211: __s66 => __s3 + __s12; __s66*kr_bb_bind_1; r211 is "BRAF_BRAF_dissociate";
  r212: __s67 => __s12 + __s12; __s67*kr_bb_bind_1; r212 is "BRAF_BRAF_dissociate";
  r213: __s68 => __s3 + __s5; __s68*kr_br_bind_1; r213 is "BRAF_RAF1_dissociate";
  r214: __s69 => __s3 + __s13; __s69*kr_br_bind_1; r214 is "BRAF_RAF1_dissociate";
  r215: __s70 => __s5 + __s12; __s70*kr_br_bind_1; r215 is "BRAF_RAF1_dissociate";
  r216: __s71 => __s12 + __s13; __s71*kr_br_bind_1; r216 is "BRAF_RAF1_dissociate";
  r217: __s11 + __s65 => __s65 + __s72; __s11*__s65*kf_bm_phosphorylation_2 + __s11*__s65*kf_bm_phosphorylation_3; r217 is "BRAF_BRAF_nvemurafenib_phosphorylation_MAP2K1_phospho + BRAF_RAF1_nvemurafenib_phosphorylation_MAP2K1_phospho";
  r218: __s11 + __s66 => __s66 + __s72; __s11*__s66*kf_bm_phosphorylation_2 + __s11*__s66*kf_bm_phosphorylation_3; r218 is "BRAF_BRAF_nvemurafenib_phosphorylation_MAP2K1_phospho + BRAF_RAF1_nvemurafenib_phosphorylation_MAP2K1_phospho";
  r219: __s11 + __s68 => __s68 + __s72; __s11*__s68*kf_bm_phosphorylation_2 + __s11*__s68*kf_bm_phosphorylation_3 + __s11*__s68*kf_rm_phosphorylation_1; r219 is "BRAF_BRAF_nvemurafenib_phosphorylation_MAP2K1_phospho + BRAF_RAF1_nvemurafenib_phosphorylation_MAP2K1_phospho + RAF1_BRAF_nvemurafenib_phosphorylation_MAP2K1_phospho";
  r220: __s11 + __s69 => __s69 + __s72; __s11*__s69*kf_bm_phosphorylation_2 + __s11*__s69*kf_bm_phosphorylation_3; r220 is "BRAF_BRAF_nvemurafenib_phosphorylation_MAP2K1_phospho + BRAF_RAF1_nvemurafenib_phosphorylation_MAP2K1_phospho";
  r221: __s9 + __s72 => __s72 + __s73; __s72*__s9*kf_mm_phosphorylation_1; r221 is "MAP2K1_phospho_phosphorylation_MAPK1_phospho";
  r222: __s11 + __s70 => __s70 + __s72; __s11*__s70*kf_rm_phosphorylation_1; r222 is "RAF1_BRAF_nvemurafenib_phosphorylation_MAP2K1_phospho";
  r223: __s8 + __s73 => __s8 + __s9; __s73*__s8*kf_dm_phosphorylation_1; r223 is "DUSP6_dephosphorylation_MAPK1_phospho";
  MAPK1_phospho_produces_SPRY4: __s73 => __s10 + __s73; __s73*kf_ms_synth_1;
  MAPK1_phospho_produces_DUSP6: __s73 => __s8 + __s73; __s73*kf_md_synth_1;
  MAPK1_phospho_produces_EGFR: __s73 => __s6 + __s73; __s73*kf_me_synth_1;
end
